p := 0.3
n1 := 0.75
n2 := 0.5
a1 := p*n1*n2
a2 := p*n1*(1 - n2)
a3 := p*(1 - n1)*n2
a4 := p*(1 - n1)*(1 - n2)
a5 := (1 - p)*n1*n2 = 0.2625
a6 := (1 - p)*n1*(1 - n2) = 0.2625
a7 := (1 - p)*(1 - n1)*n2
a8 := (1 - p)*(1 - n1)*(1 - n2)
[a + b; □]
0 == 0
P0111 == P0011*a5 + P0111*(a1 + a7 + a8) + P0110*(1 - p)*(1 - n1)
[
    P0000 == P0000*p + P0001*p*(1 - n2);
    P0010 == P0000*(1 - p) + P0010*p*n1 + P0001*(1 - p)*(1 - n2) + P0011*a2;
    P0011 == P0001*(1 - p)*n2 + P0010*(1 - p)*(1 - n1) + P0011*a1 + P1110*(1 - n1) + P0110*(1 - n1)*p + P0111*(a3 + a4) + P0011*(a7 + a8) + P1111*((1 - n1)*n2 + (1 - n1)*(1 - n2));
    P0001 == P0010*p*(1 - n1) + P0001*p*n2 + P0011*(a3 + a4);
    P0110 == P0011*a6 + P0110*p*n1 + P0010*(1 - p)*n1 + P0111*a2;
    0 == 0;
    P1110 == P0110*(1 - p)*n1 + P0111*a6 + P1111*n1*(1 - n2) + P1110*n1;
    P1111 == P0111*a5 + P1111*n1*n2;
    P0000 + P0010 + P0011 + P0001 + P0110 + P0111 + P1110 + P1111 == 1
] solve, P0000, P0010, P0011, P0001, P0110, P0111, P1110, P1111 → [0.00495008662652, 0.0462008085141, 0.215603773066, 0.0231004042571, 0.120138370027, 0.108940638856, 0.435310850334, 0.0457550683193]
